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/batch
! ANSYS input file written by Workbench version 2021 R2
/com,*********** Resuming The ANSYS db File from Modal Solution ***********
resume,file,db
/title,mechanical_linked--Harmonic Response (C5)
/prep7
/com,*********** Defining Loadings ***********
/com,*********** Define Force Using Surface Effect Elements ***********
local,12,0,0.,0.,0.,0.,0.,0.
csys,0
et,2,154
eblock,10,,,144
(15i9)
     1729        2        2        2       12     2054     1922     1586     1585     7767     7108     7105     7106
     1730        2        2        2       12     2055     1933     1922     2054     7789     7766     7767     8018
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-1
esel,s,type,,2
keyop,2,2,1                ! Apply load in local coordinate system
keyop,2,7,1                ! Use original area so load is constant in large deformation
esel,all

*DIM,_loadvari47x,TABLE,1,1,1,TIME
! Time values
*TAXIS,_loadvari47x(1),1,1.
! Load values
_loadvari47x(1,1,1) = 4.98097349045911


*DIM,_loadvari47xi,TABLE,1,1,1,TIME
! Time values
*TAXIS,_loadvari47xi(1),1,1.
! Load values
_loadvari47xi(1,1,1) = 0.435778713738324


*DIM,_loadvari47y,TABLE,1,1,1,TIME
! Time values
*TAXIS,_loadvari47y(1),1,1.
! Load values
_loadvari47y(1,1,1) = 0.


*DIM,_loadvari47yi,TABLE,1,1,1,TIME
! Time values
*TAXIS,_loadvari47yi(1),1,1.
! Load values
_loadvari47yi(1,1,1) = 0.


*DIM,_loadvari47z,TABLE,1,1,1,TIME
! Time values
*TAXIS,_loadvari47z(1),1,1.
! Load values
_loadvari47z(1,1,1) = 0.


*DIM,_loadvari47zi,TABLE,1,1,1,TIME
! Time values
*TAXIS,_loadvari47zi(1),1,1.
! Load values
_loadvari47zi(1,1,1) = 0.


fini
/com,*********** Performing Modal Re-start ***********
/solu
antype,modal,restart    ! restarting the modal analysis
modcontrol,on
thexpand,off     ! ignore thermal strains
mxpand,,,,yes,,yes     ! expand requested results and write them to file.mode
outres,erase
outres,all,none
outres,nsol,all
outres,eangl,all
outres,etmp,all
outres,veng,all
outres,strs,all
outres,epel,all
outres,rsol,all
outres,cont,all
fdele,all,all
sfdele,all,all
sfedele,all,all,all
acel,0,0,0                 ! zero out the acceleration
/com,*********** Setting and Solving Each Load Step ***********
esel,s,type,,2
nsle
sfe,all,1,pres,1,1
nsel,all
esel,all
solve
/com,**********************
fdele,all,all
sfdele,all,all
sfedele,all,all,all
acel,0,0,0                 ! zero out the acceleration
/com,*********** Setting and Solving Each Load Step ***********
esel,s,type,,2
nsle
sfe,all,1,pres,2,1
nsel,all
esel,all
solve
/com,**********************
/com *************** Write FE CONNECTORS *********
CEWRITE,file,ce,,INTE
fini
/com,*********** Performing MSUP Harmonic Solve ***********
/solu
antype,harm
hropt,msup
thexpand,off     ! ignore thermal strains
hrout,off
kbc,1
harfrq,0.000000,20.000000
nsub,10
fdele,all,all
sfdele,all,all
sfedele,all,all,all
acel,0,0,0                 ! zero out the acceleration
lvscale,0,1
/com,*********** Scaling Each Load Step for MSUP Solve ***********
lvscale,%_loadvari47x%,1
lvscale,%_loadvari47xi%,2
! *********** WB SOLVE COMMAND ***********
! check interactive state
*get,ANSINTER_,active,,int
*if,ANSINTER_,ne,0,then
/eof
*endif
solve

fini
! ------- MSUP EXPANSION PASS -------
/solu
expass,on
hrexp,all
outres,erase
outres,all,none
outres,nsol,all
outres,eangl,all
outres,etmp,all
outres,veng,all
outres,strs,all
outres,epel,all
outres,rsol,all
outres,cont,all
numexp,all,,,yes        ! expand results at all freq. and calculate requested result items
! *********** WB SOLVE COMMAND ***********
! check interactive state
*get,ANSINTER_,active,,int
*if,ANSINTER_,ne,0,then
/eof
*endif
solve
fini
/post1
fini
