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/batch
! ANSYS input file written by Workbench version 2021 R2
! File used for geometry attach: C:\Users\fnegri\AppData\Local\Temp\WB_fnegri_30380_2\wbnew_files\dp0\SYS\DM\SYS.scdoc
/title,wbnew--Static Structural (A5)
/com,--- Data in consistent NMM units. See Solving Units in the help system for more information.
/units,MPA
/prep7
! Turn off shape checking because checks already performed inside WB mesher.
! See help system for more information.
SHPP,OFF,,NOWARN
etcon,set             ! allow ANSYS to choose best KEYOP's for 180x elements, resets any applicable keyopt to MAPDL defaults
/com,*********** Nodes for the whole assembly ***********
nblock,3,,9109
(1i9,3e20.9e3)
        1     8.333333333E+00     8.333333333E+00     1.666666667E+00
        2     8.333333333E+00     8.333333333E+00     3.333333333E+00
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-1
/com,*********** Elements for Body 1 "SYS\Solid" ***********
et,1,186
keyo,1,2,1          ! set full integration on SOLID186
eblock,19,solid,,1728
(19i9)
        1        1        1        1        0        0        0        0       20        0        1        1     2032     2064     2066     1452     2053     2065     2187
     2202     7987     8039     2203     6816     8017     8040     6817     2201     7986     8038     8043
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-1
/com,*********** Send User Defined Coordinate System(s) ***********
csys,0
toffst,273.15,  ! Temperature offset from absolute zero
/com,*********** Set Reference Temperature ***********
tref,22.
/com,*********** Send Materials ***********
Temperature = 'TEMP' ! Temperature
MP,DENS,1,7.85e-09,	! tonne mm^-3
MP,ALPX,1,1.2e-05,	! C^-1
MP,C,1,434000000,	! mm^2 s^-2 C^-1
MP,KXX,1,60.5,	! tonne mm s^-3 C^-1
MP,RSVX,1,0.00017,	! ohm mm
MP,EX,1,200000,	! tonne s^-2 mm^-1
MP,NUXY,1,0.3,
MP,MURX,1,10000,

!************************* Model Summary ********************
!SYS\Solid,	Structural Steel,	matid,	1
!************************* End Model Summary ********************
CMBLOCK,_CM33_FIXEDSU,NODE,      481
(8i10)
      1597      1598      1599      1600      1601      1602      1603      1604
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/com,*********** Create Displacement Components For Use In Future MSUP or Multistage Analysis ******
CMBLOCK,_CM31_DISP,NODE,      481
(8i10)
      1574      1575      1576      1577      1578      1579      1580      1581
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/com,*********** Fixed Supports ***********
CMBLOCK,_FIXEDSU,NODE,      481
(8i10)
      1597      1598      1599      1600      1601      1602      1603      1604
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cmsel,s,_FIXEDSU
d,all,all
nsel,all
fini
/com,****************************************************************************
/com,*************************    SOLUTION       ********************************
/com,****************************************************************************
/solu
antype,0                   ! static analysis
_thickRatio=  1     ! Ratio of thick parts in the model
eqsl,pcg,1e-8,,,,,,1
cntr,print,1               ! print out contact info and also make no initial contact an error
nldiag,cont,iter           ! print out contact info each equilibrium iteration
rescontrol,linear,last           ! Turn on restart files due to future eigen analysis intent
/com,****************************************************
/com,******************* SOLVE FOR LS 1 OF 1 ****************
/com,*** Set Displacements ***
CMBLOCK,_CM31UX_XP,NODE,      481
(8i10)
      1574      1575      1576      1577      1578      1579      1580      1581
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cmsel,s,_CM31UX_XP
d,all,ux,2.
nsel,all

/com,*** Component For All Non-Zero UX Displacements ***
cmsel,s,_CM31ux_xp
cm,_DISPNONZEROUX,NODE
nsel,all

nsub,1,1,1
time,1.
outres,erase
outres,all,none
outres,nsol,all,
outres,rsol,all
outres,eangl,all
outres,etmp,all
outres,veng,all
outres,strs,all,
outres,epel,all,
outres,eppl,all,
outres,cont,all,
! *********** WB SOLVE COMMAND ***********
! check interactive state
*get,ANSINTER_,active,,int
*if,ANSINTER_,ne,0,then
/eof
*endif
solve
/com *************** Write FE CONNECTORS *********
CEWRITE,file,ce,,INTE
/com,****************************************************
/com,*************** FINISHED SOLVE FOR LS 1 *************
*get,_PCGITER,active,,solu,cgiter
/post1
fini
