/COM, MOTORBIKE FRAME MODEL
/COM, ------------------------------------------------
/COM,

FINISH
/CLEAR,START
/PREP7
/NOPR
/TITLE, MOTORBIKE FRAME MODEL FOR HPS

! OPTIMIZATION PARAMETERS
! -----------------------

! Optimization can develop three custom tubes with radius and thickness
*DIM,radius,ARRAY,3,1,1, , ,
radius(1)=14.0
radius(2)=15.0
radius(3)=5.0

*DIM,thickness,ARRAY,3,1,1, , ,
thickness(1)=1.0
thickness(2)=1.1
thickness(3)=1.0

! Optimization evaluates where to use the three custom tubes
num_tubes=21
*DIM,tubes,ARRAY,num_tubes,1
tubes(1)=1
tubes(2)=1
tubes(3)=3
tubes(4)=1
tubes(5)=1
tubes(6)=1
tubes(7)=1
tubes(8)=1
tubes(9)=1
tubes(10)=1
tubes(11)=3
tubes(12)=3
tubes(13)=1
tubes(14)=3
tubes(15)=2
tubes(16)=2
tubes(17)=3
tubes(18)=2
tubes(19)=3
tubes(20)=3
tubes(21)=1

! Exemplary process step properties that can be replaced in an input file
name='name'
application_name='app_name'
num_cores=1
cpu_core_usage=0.5

! ELEMENT TYPES
! -------------
ET,  11  , BEAM188

! Key Options
! -----------

! Coordinate Systems
! ----------------

! No special coordinate systems defined

! TUBE SECTIONS
! -------------------
n=25
! Variable sections
*DO,i,1,num_tubes
	SECTYPE,   i, BEAM, CTUBE, , 0
	SECOFFSET, CENT
	SECDATA,radius(tubes(i))-thickness(tubes(i)),radius(tubes(i)),n,0,0,0,0,0,0,0,0,0
*ENDDO

! Steering tube
SECTYPE,   101, BEAM, CTUBE, , 0
SECOFFSET, CENT
SECDATA,37,40,n,0,0,0,0,0,0,0,0,0

! Engine stiffness
SECTYPE,   102, BEAM, CSOLID, , 0
SECOFFSET, CENT
SECDATA,6,n,0,0,0,0,0,0,0,0,0,0
SECTYPE,   103, BEAM, CSOLID, , 0
SECOFFSET, CENT
SECDATA,8,25,0,0,0,0,0,0,0,0,0,0


! NODES
! -----
NBLOCK,6,SOLID
(3i8,6e16.9)
       1       0       0 0.00000000      134.000000      0.00000000
       2       0       0 0.00000000      134.000000      96.0000000
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N,R5.3,LOC, -1,


! ELEMENTS
! --------
EBLOCK,19,SOLID
(19i7)
1      11     1      1      0      0      0      0      2      0      1      1      2
1      11     1      2      0      0      0      0      2      0      2      2      3
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-1

! MATERIALS
! ---------
MPTEMP,R5.0, 1, 1, 0. ,
MPDATA,R5.0, 1,EX,1      , 1, 210000.000
MPTEMP,R5.0, 1, 1, 0. ,
MPDATA,R5.0, 1,PRXY,1      , 1, 0.300000000
MPTEMP,R5.0, 1, 1, 0. ,
MPDATA,R5.0, 1,DENS,1      , 1, 7.85000000e-09
MPTEMP,R5.0, 1, 1, 0. ,
MPDATA,R5.0, 1,EX,2      , 1, 70000.0000
MPTEMP,R5.0, 1, 1, 0. ,
MPDATA,R5.0, 1,PRXY,2      , 1, 0.300000000
MPTEMP,R5.0, 1, 1, 0. ,
MPDATA,R5.0, 1,DENS,2      , 1, 2.70000000e-09

! BOUNDARY CONDTIONS
! ------------------
D,1      ,UX  ,0.00000000
D,1      ,UY  ,0.00000000
D,1      ,UZ  ,0.00000000
D,15     ,UZ  ,0.00000000
D,17     ,UX  ,0.00000000
D,17     ,UY  ,0.00000000
D,17     ,UZ  ,0.00000000

FINISH
/SOLU
! TORSION LOADCASE
M_torsion=700000.000
F,15     ,MX  ,M_torsion
SOLVE

/POST1
SET,LAST

! v1 = C2 + U2 - (C1 + U1)
n1=1
n2=17
*VEC,v1,D,ALLOC,3
!*DIM,v1,ARRAY,3,1
v1(1) = NX(n2) + UX(n2) - (NX(n1)+UX(n1) )
v1(2) = NY(n2) + UY(n2) - (NY(n1)+UY(n1) )
v1(3) = NZ(n2) + UZ(n2) - (NZ(n1)+UZ(n1) )

! v2 = C2 + U2 - (C1 + U1)
n1=14
n2=16
*VEC,v2,D,ALLOC,3
!*DIM,v2,ARRAY,3,1
v2(1) = NX(n2) + UX(n2) - (NX(n1)+UX(n1) )
v2(2) = NY(n2) + UY(n2) - (NY(n1)+UY(n1) )
v2(3) = NZ(n2) + UZ(n2) - (NZ(n1)+UZ(n1) )

! double twist = acos ( mtl::dot ( v1, v2 ) / ( mtl::two_norm( v1 ) * two_norm( v2 ) ) );
*DOT,v1,v2,dot_v1v2
*NRM,v1,NRM2,v1n
*NRM,v2,NRM2,v2n
twist=acos(dot_v1v2/(v1n*v2n))
PI=acos(-1)
! Twist in degrees, minus 90deg
twist=abs(PI/2-twist)
twist=twist*180/PI
torsion_stiffness=M_torsion/1000.0
torsion_stiffness=torsion_stiffness/twist

FINISH
/SOLU

! BRAKING LOADCASE
FDELE,ALL,ALL
F_braking = 4256.0E3/182.5
F,14, FX, -F_braking
F,16, FX, F_braking
SOLVE

/POST1
SET,LAST
*get,max_stress,SECR,ALL,S,EQV,MAX

! Eval weight in kg, without engine beams
ALLS
*GET,weight,ELEM,0,MTOT,Z
weight_engine=3.747881184
weight=weight*1000.0-weight_engine

! Create output file
*CFOPEN,motorbike_frame_results,txt
*VWRITE
('### Motorbike Frame Results')

*VWRITE,weight
('weight = ',F20.8)

*VWRITE,torsion_stiffness
('torsion_stiffness = ',F20.8)

*VWRITE,max_stress
('max_stress = ',F20.8)

*CFCLOSE

! Alternative to write out all scalar parameters
!PARSAV,SCALAR,'motorbike_frame_results','parsav',' '


! SNAPSHOT IMAGE
! --------------
/RESET
ALLS
ESEL,U,SEC,,102
ESEL,U,SEC,,103
EPLOT
/ESHAPE,1
/COLOR,PBAK,0,0
QUALITY,1,0,1,0,0,0
!/VIEW,  1, -0.417114883137    , -0.644625652122    ,  0.640681623657
!/ANG,   1,   41.0870383711
!/LIG,   1,1, 1.000,  0.516358422617    , -0.673953091332    , -0.528357085763    ,  0.124000000000
!/DIST, 1 ,1.082226,1
/DIST, 1 ,1.082226,1
/VIEW,  1, -0.452363751032    , -0.785056420562    ,  0.423147082334
/ANG,   1,   62.3643302729
/LIG,   1,1, 1.000,  0.495872766749    , -0.576245287297    , -0.649654960780    ,  0.124000000000

/SHOW,JPEG,,0
JPEG,QUAL,75,
JPEG,ORIENT,HORIZ
JPEG,COLOR,2
JPEG,TMOD,1
/GFILE,800,

! Image 1
EPLOT

! Image 2
/PNUM,SECT,1
EPLOT

/SHOW,CLOSE

/GO
FINISH
